OpenVSP model (file version 5), 13 components.
Geometry view with OpenVSP parameter names; values to 6 digits, angles in degrees, lengths in the model's unit.
Overall bounding box: X_Min=-0.09 X_Len=1.79543 Y_Min=-1.11951 Y_Len=2.23902 Z_Min=-0.272487 Z_Len=0.567103

Fuselage "Fuselage"
  location (X Y Z) 0 0 0, rotation 0 0 0
  bounding box size 1.49 0.18 0.18
  mass: Density=0 Shell_Flag=0 Mass_Area=1 Mass_Prior=0
  Design: Length=1.4
  cross sections:
    n  XLocPercent  YLocPercent  ZLocPercent  shape
    0  0            0            0            circle Circle_Diameter=0.18
    1  0.25         0            0            as above
    2  0.5          0            0            as above
    3  0.75         0            0            as above
    4  0.875        0            0            circle Circle_Diameter=0.14
    5  1            0            0            point

Wing "Wing Winglets", child of "Fuselage"
  location (X Y Z) 0.5 0 0, rotation 0 3 0
  symmetric about XZ
  bounding box size 0.300272 2.23902 0.0737345
  mass: Density=1 Shell_Flag=0 Mass_Area=1 Mass_Prior=0 PointMass=1.6 CGx=0.155 CGy=0 CGz=0 Ixx=0 Iyy=0 Izz=0 Ixy=0 Ixz=0 Iyz=0
  totals: TotalSpan=2.28 TotalProjectedSpan=2.22999 TotalChord=0.25 TotalArea=0.625 TotalAR=7.95657
  root: chord 0.3, twist 0, NACA 5-digit CamberLoc=0.15 IdealCl=0.3 ThickChord=0.15
  sections:
    n  Span  Root_Chord  Tip_Chord  Area     Sweep  Sweep_Location  Dihedral  Twist  Twist_Location  tip airfoil
    1  0.24  0.3         0.3        0.072    0      0.5             0         0      0.25            as above
    2  0.83  0.3         0.25       0.22825  0      0               0         0      0.25            as above
    3  0.07  0.25        0.1        0.01225  0      1               50        0      0.25            NACA 4-series Camber=0 CamberLoc=0.15 ThickChord=0.117857
  SS_Control "Ailerons": UStart=0.422 UEnd=0.572 Length_C_Start=0.41 Length_C_End=0.41 Length_Start=0.120745 Length_End=0.10537 LE_Flag=0 Surf_Type=2
  SS_Control "Flaps": UStart=0 UEnd=0.395 Length_C_Start=0.41 Length_C_End=0.41 Length_Start=0.123191 Length_End=0.123005 LE_Flag=0 Surf_Type=2

Wing "Wing No Winglets", child of "Wing Winglets"
  location (X Y Z) 0.5 0 0, rotation 0 3 0
  symmetric about XZ
  bounding box size 0.300272 2.17779 0.0479798
  mass: Density=1 Shell_Flag=0 Mass_Area=1 Mass_Prior=0 PointMass=1.6 CGx=0.155 CGy=0 CGz=0 Ixx=0 Iyy=0 Izz=0 Ixy=0 Ixz=0 Iyz=0
  totals: TotalSpan=2.14 TotalProjectedSpan=2.14 TotalChord=0.2875 TotalArea=0.6005 TotalAR=7.62631
  root: chord 0.3, twist 0, NACA 5-digit CamberLoc=0.15 IdealCl=0.3 ThickChord=0.15
  sections:
    n  Span  Root_Chord  Tip_Chord  Area     Sweep  Sweep_Location  Dihedral  Twist  Twist_Location  tip airfoil
    1  0.24  0.3         0.3        0.072    0      0.5             0         0      0.25            as above
    2  0.83  0.3         0.25       0.22825  0      0               0         0      0.25            as above
  SS_Control "Ailerons": UStart=0.55 UEnd=0.7 Length_C_Start=0.4 Length_C_End=0.4 Length_Start=0.116 Length_End=0.104 LE_Flag=0 Surf_Type=2
  SS_Control "Flaps": UStart=0 UEnd=0.5 Length_C_Start=0.4 Length_C_End=0.4 Length_Start=0.120186 Length_End=0.12 LE_Flag=0 Surf_Type=2

Wing "RudderVator"
  location (X Y Z) 1.1 0 0.01, rotation 0 0 0
  symmetric about XZ
  bounding box size 0.312164 0.673535 0.294621
  mass: Density=1 Shell_Flag=0 Mass_Area=1 Mass_Prior=0
  totals: TotalSpan=0.87 TotalProjectedSpan=0.666459 TotalChord=0.15 TotalArea=0.1305 TotalAR=3.40358
  root: chord 0.2, twist 0, NACA 4-series Camber=0 CamberLoc=0.2 ThickChord=0.1
  sections:
    n  Span   Root_Chord  Tip_Chord  Area     Sweep  Sweep_Location  Dihedral  Twist  Twist_Location  tip airfoil
    1  0.435  0.2         0.1        0.06525  26     0               40        0      0               as above
  SS_Control "SS_CONT_0": UStart=0.4 UEnd=0.65 Length_C_Start=0.5 Length_C_End=0.5 Length_Start=0.09 Length_End=0.0525 LE_Flag=0 Surf_Type=2

Custom "Disk"
  location (X Y Z) 1.4 0 0.025, rotation 0 0 0
  bounding box size 0 0.4 0.4
  Design: Diameter=0.4
  custom script Disk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

Fuselage "FuselageGeom"
  location (X Y Z) 0.2 0 -0.075, rotation -180 85.3279 -180
  bounding box size 0.0319772 0.016 0.197487
  Design: Length=0.196
  cross sections:
    n  XLocPercent  YLocPercent  ZLocPercent  shape
    0  0            0            0            point
    1  0.0184426    0            0            circle Circle_Diameter=0.016
    2  0.5          0            0            as above
    3  0.625        0            0            as above
    4  0.75         0            0            as above
    5  0.875        0            0            as above
    6  0.993852     0            0            as above
    7  1            0            0            circle Circle_Diameter=0

Fuselage "FuselageGeom"
  location (X Y Z) 0.6 0.461 0, rotation 0 90 0
  symmetric about XZ
  bounding box size 0.016 0.938 0.262115
  Design: Length=0.261
  cross sections:
    n  XLocPercent  YLocPercent  ZLocPercent  shape
    0  0            0            0            point
    1  0.0184426    0            0            circle Circle_Diameter=0.016
    2  0.5          0            0            as above
    3  0.625        0            0            as above
    4  0.75         0            0            as above
    5  0.875        0            0            as above
    6  0.993852     0            0            as above
    7  1            0            0            circle Circle_Diameter=0

Fuselage "FuselageGeom"
  location (X Y Z) 1.4 0 0.025, rotation 0 90 0
  bounding box size 0.016 0.016 0.201468
  Design: Length=0.2
  cross sections:
    n  XLocPercent  YLocPercent  ZLocPercent  shape
    0  0            0            0            point
    1  0.0184426    0            0            circle Circle_Diameter=0.016
    2  0.5          0            0            as above
    3  0.625        0            0            as above
    4  0.75         0            0            as above
    5  0.875        0            0            as above
    6  0.993852     0            0            as above
    7  1            0            0            circle Circle_Diameter=0

Custom "Box"
  location (X Y Z) 0 0 -0.175, rotation 0 0 0
  bounding box size 1.70543 1.13531 0.001
  Design: Height=0.001 Length=1.70543 SquareFlag=0 Width=1.13531
  custom script Box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

Custom "Box"
  location (X Y Z) 0 0 0, rotation 0 0 0
  bounding box size 1.70543 0.85095 0.001
  Design: Height=0.001 Length=1.70543 SquareFlag=0 Width=0.85095
  custom script Box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

Custom "Box"
  location (X Y Z) 0 0 -0.261, rotation 0 0 0
  bounding box size 1.70543 1.13531 0.001
  Design: Height=0.001 Length=1.70543 SquareFlag=0 Width=1.13531
  custom script Box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

Fuselage "Fuselage"
  location (X Y Z) 0 0 0, rotation 0 0 0
  bounding box size 1.4 0.18 0.18
  mass: Density=0 Shell_Flag=0 Mass_Area=1 Mass_Prior=0
  Design: Length=1.4
  cross sections:
    n  XLocPercent  YLocPercent  ZLocPercent  shape
    0  0            0            0            circle Circle_Diameter=0.18
    1  0.25         0            0            as above
    2  0.5          0            0            as above
    3  0.75         0            0            as above
    4  0.875        0            0            circle Circle_Diameter=0.14
    5  1            0            0            point

Ellipsoid "EllipsoidGeom"
  location (X Y Z) -0.09 0 0, rotation 0 0 0
  bounding box size 0.174 0.1798 0.1798
  Design: A_Radius=0.087 B_Radius=0.0899 C_Radius=0.0899

VSPAERO settings: Sref=0.625 bref=2.28 cref=0.25 Xcg=0.561 Ycg=-4.36801e-05 Zcg=0.07 AlphaStart=0 AlphaEnd=10 AlphaNpts=21 BetaStart=0 BetaEnd=0 BetaNpts=1 MachStart=0.001 MachEnd=0 MachNpts=1 ReCref=404026 Vinf=24 Rho=1.225
  control group "Ailerons": DeflectionAngle=0
  control group "Ruddervator 1": DeflectionAngle=10
  control group "Ruddervator 2": DeflectionAngle=10
  control group "Flaps": DeflectionAngle=10
